Clear

Redirect LoadShapes_ckt7.dss
Redirect Substation_ckt7.dss
Redirect LineCodes_ckt7.dss
Redirect Lines_ckt7.dss
Redirect Services_ckt7.dss
Redirect Load_XFMR_ckt7.dss
Redirect Loads_ckt7.dss
Redirect Capacitors_ckt7.dss

! Initial allocation factors for allocated loads
redirect AllocationFactors.dss

! Define an energy meter -- needed for plot profile and yearly simulations
New Energymeter.25607 element=line.333 terminal=1 peakcurrent=[272.4, 243.4, 272.0]

! Let OpenDSS assign the bus voltage bases for reports
Set voltagebases = [115, 12.47, 0.480, 0.4157, 0.208, 0.12]
Calcvoltagebases

! Now that buses are defined, define coordinates
Buscoords  Buscoords_ckt7.dss
BatchEdit Load..* Vminpu=0.85

AllocateLoads

! -------------------------------
! DER / PV added at bus 318412
! 3-phase, 12.47 kV feeder-level PV
! -------------------------------
New PVSystem.PV_318412 phases=3 bus1=318412.1.2.3 kV=12.47 kVA=500 Pmpp=500 pf=1

Solve

Show Powers kVA Seq
Show Voltages LN Nodes
Show Currents Elements

Solve
Show Powers kVA Seq

Show Voltages LN Nodes
Show Powers kVA Seq
Show Currents Elements
Export Voltages
Export Currents
Export Powers
